2020-11-02
오후 09:45
$PROB Simple_2comp, M3 method
$INPUT ID TIME AMT DV MDV CMT ADDL II SPECIES SEX MULTIPLE DOSE ROUTE FORMULATION TAD BQL LIV RATE TYPE
$DATA  ..//Monkey_plasma_dual_m3.csv IGNORE=@

$SUBROUTINE ADVAN4 TRANS4

$PK
;---- FIXED EFFECT DEFINITION ----
 TVCL = THETA(3)
 TVV2 = THETA(4)
 TVV3 = THETA(5)
 TVQ  = THETA(6)
 TVKA = THETA(7)
 TVF  = THETA(8)
 TVFA = THETA(9)
 TVD2 = THETA(10)
 TVALAG1 = THETA(11)
 TVALAG2 = THETA(12)

;---- RANDOM EFFECT DEFINITION ----

 CL   = TVCL * EXP(ETA(1))
 V2   = TVV2 * EXP(ETA(2))
 V3   = TVV3 * EXP(ETA(3))
 Q    = TVQ  * EXP(ETA(4))
 KA   = TVKA * EXP(ETA(5))
 FF   = TVF * EXP(ETA(6))
 FA   = TVFA * EXP(ETA(7))
 D2   = TVD2 * EXP(ETA(8))
 ALAGPO1 = TVALAG1 * EXP(ETA(9))
 ALAGPO2 = TVALAG2 * EXP(ETA(10))

 S2 = V2

IF(ROUTE.EQ.1) THEN
 F1 = FF * FA
 F2 = FF * (1 - FA)
 ALAG1 = ALAGPO1
 ALAG2 = ALAGPO2
ELSE
 F1 = 1
 F2 = 1
 ALAG1 = 0
 ALAG2 = 0
ENDIF

$ERROR
  LLOQ  = 1.0
  IPRED = F
  IRES = DV-IPRED
  W = SQRT(THETA(1)**2 + THETA(2)**2 * IPRED**2)
  IWRES = IRES/W

  IF(DV .LT. LLOQ) THEN
    F_FLAG=1
    Y = PHI((LLOQ-IPRED)/W)
  ELSE
    F_FLAG=0
    Y = IPRED + W*EPS(1)
  ENDIF

$THETA
 ; Error
 0.0001 FIX
 0.5

 ; Distribution
 (0, 4) ; CL(3) 2.16 L/h/kg
 (0, 10) ; V2(4) 3.34 L/kg
 (0, 2) ; V3(5) 0.651 L/kg
 (0, 2) ; Q (6) 0.12 L/h/kg

 ; Absorption
 (0, 1) ; KA(7) 0.299 /h
 (0, 0.1)  ; FF(8) 0.0201
 (0, 0.5)  ; FA(9) 0.623
 (0, 1)    ; D2(10)   7.92
 (0, 4)    ; ALAG1(11) 4.00
 (0, 0.25)    ; ALAG2(11) 4.00

$OMEGA
 0 FIX
 0.1
 0 FIX
 0 FIX
 0 FIX
 0.1
 0 FIX
 0 FIX
 0 FIX
 0.1
$SIGMA
 1 FIX

$ESTIMATION NOABORT MAXEVAL=9999 METHOD=1 NUMERICAL LAPLACIAN SLOW INTER PRINT=10 SIGDIGITS=3

$TABLE ID TIME AMT DV MDV IPRED CWRES IWRES BQL   ONEHEADER NOPRINT FILE = sdtab002
$TABLE ID CL V2 V3 Q KA F1 DOSE                      ONEHEADER NOPRINT NOAPPEND FILE = patab002

NM-TRAN MESSAGES
 WARNINGS AND ERRORS (IF ANY) FOR PROBLEM    1
 (WARNING  2) NM-TRAN INFERS THAT THE DATA ARE POPULATION.

1NONLINEAR MIXED EFFECTS MODEL PROGRAM (NONMEM) VERSION 7.4.1
 ORIGINALLY DEVELOPED BY STUART BEAL, LEWIS SHEINER, AND ALISON BOECKMANN
 CURRENT DEVELOPERS ARE ROBERT BAUER, ICON DEVELOPMENT SOLUTIONS,
 AND ALISON BOECKMANN. IMPLEMENTATION, EFFICIENCY, AND STANDARDIZATION
 PERFORMED BY NOUS INFOSYSTEMS.
 PROBLEM NO.:         1
 Simple_2comp, M3 method
 TOT. NO. OF OBS RECS:      175
 TOT. NO. OF INDIVIDUALS:       17
 TWO COMPARTMENT MODEL WITH FIRST-ORDER ABSORPTION (ADVAN4)
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 #TBLN:      1
 #METH: Laplacian Conditional Estimation with Interaction
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
 #TERM:
0MINIMIZATION TERMINATED
 DUE TO PROXIMITY OF NEXT ITERATION EST. TO A VALUE
 AT WHICH THE OBJ. FUNC. IS INFINITE
0AT THE LAST COMPUTED INFINITE VALUE OF THE OBJ. FUNCT.:

0PRED EXIT CODE = 1
0INDIVIDUAL NO.       2   ID= 2.00000000000000E+00   (WITHIN-INDIVIDUAL) DATA REC NO.   4
 THETA=
  1.00E-04   7.43E-01   6.36E+00   2.38E+01   2.12E+00   6.55E-01   6.88E-01   2.73E-02   5.41E-01   2.71E+00
  5.10E+00   2.48E-01
 ETA=
  0.00E+00   6.33E+01   0.00E+00   0.00E+00   0.00E+00  -4.66E-01   0.00E+00   0.00E+00   0.00E+00   1.65E+00
 OCCURS DURING SEARCH FOR ETA AT A NONZERO VALUE OF ETA
 A ROOT OF THE CHARACTERISTIC EQUATION IS ZERO BECAUSE
 K*K32 IS MUCH SMALLER THAN  (K+K23+K32)**2.
 PERHAPS K OR K32 IS VERY SMALL, OR K23 IS VERY LARGE.

 NO. OF FUNCTION EVALUATIONS USED:      309
 NO. OF SIG. DIGITS UNREPORTABLE

 ETABAR IS THE ARITHMETIC MEAN OF THE ETA-ESTIMATES,
 AND THE P-VALUE IS GIVEN FOR THE NULL HYPOTHESIS THAT THE TRUE MEAN IS 0.

 ETABAR:         0.0000E+00 -7.3721E-01  0.0000E+00  0.0000E+00  0.0000E+00 -2.9493E-02  0.0000E+00  0.0000E+00  0.0000E+00 -2.3156E-01
 SE:             0.0000E+00  2.0053E-01  0.0000E+00  0.0000E+00  0.0000E+00  1.2232E-01  0.0000E+00  0.0000E+00  0.0000E+00  1.4901E-01
 N:                      17          17          17          17          17          17          17          17          17          17

 P VAL.:         1.0000E+00  2.3661E-04  1.0000E+00  1.0000E+00  1.0000E+00  8.0947E-01  1.0000E+00  1.0000E+00  1.0000E+00  1.2019E-01

 ETASHRINKSD(%)  1.0000E+02  6.1600E+01  1.0000E+02  1.0000E+02  1.0000E+02  1.6973E+00  1.0000E+02  1.0000E+02  1.0000E+02  2.4523E+01
 ETASHRINKVR(%)  1.0000E+02  8.5255E+01  1.0000E+02  1.0000E+02  1.0000E+02  3.3658E+00  1.0000E+02  1.0000E+02  1.0000E+02  4.3033E+01
 EBVSHRINKSD(%)  0.0000E+00  1.4233E+00  0.0000E+00  0.0000E+00  0.0000E+00  2.0665E+01  0.0000E+00  0.0000E+00  0.0000E+00  2.9777E+01
 EBVSHRINKVR(%)  0.0000E+00  2.8263E+00  0.0000E+00  0.0000E+00  0.0000E+00  3.7060E+01  0.0000E+00  0.0000E+00  0.0000E+00  5.0687E+01
 EPSSHRINKSD(%)  1.8931E+01
 EPSSHRINKVR(%)  3.4279E+01


 TOTAL DATA POINTS NORMALLY DISTRIBUTED (N):          136
 N*LOG(2PI) CONSTANT TO OBJECTIVE FUNCTION:    249.95128103167096
 OBJECTIVE FUNCTION VALUE WITHOUT CONSTANT:    984.45047114701720
 OBJECTIVE FUNCTION VALUE WITH CONSTANT:       1234.4017521786882
 REPORTED OBJECTIVE FUNCTION DOES NOT CONTAIN CONSTANT

 TOTAL EFFECTIVE ETAS (NIND*NETA):                            45


 #TERE:
 Elapsed estimation  time in seconds:     7.13
 Elapsed postprocess time in seconds:     0.02

 ********************                LAPLACIAN CONDITIONAL ESTIMATION WITH INTERACTION               ********************
 #OBJT:**************                       MINIMUM VALUE OF OBJECTIVE FUNCTION                      ********************
 #OBJV:********************************************      984.450       **************************************************

 ********************                LAPLACIAN CONDITIONAL ESTIMATION WITH INTERACTION               ********************
 ********************                             FINAL PARAMETER ESTIMATE                           ********************

 THETA - VECTOR OF FIXED EFFECTS PARAMETERS   *********
         TH 1      TH 2      TH 3      TH 4      TH 5      TH 6      TH 7      TH 8      TH 9      TH10      TH11      TH12
         1.00E-04  7.43E-01  6.36E+00  2.38E+01  2.12E+00  6.55E-01  6.88E-01  2.73E-02  5.41E-01  2.71E+00  5.10E+00  2.48E-01

 OMEGA - COV MATRIX FOR RANDOM EFFECTS - ETAS  ********
         ETA1      ETA2      ETA3      ETA4      ETA5      ETA6      ETA7      ETA8      ETA9      ET10
 ETA1
+        0.00E+00
 ETA2
+        0.00E+00  4.93E+00
 ETA3
+        0.00E+00  0.00E+00  0.00E+00
 ETA4
+        0.00E+00  0.00E+00  0.00E+00  0.00E+00
 ETA5
+        0.00E+00  0.00E+00  0.00E+00  0.00E+00  0.00E+00
 ETA6
+        0.00E+00  0.00E+00  0.00E+00  0.00E+00  0.00E+00  2.80E-01
 ETA7
+        0.00E+00  0.00E+00  0.00E+00  0.00E+00  0.00E+00  0.00E+00  0.00E+00
 ETA8
+        0.00E+00  0.00E+00  0.00E+00  0.00E+00  0.00E+00  0.00E+00  0.00E+00  0.00E+00
 ETA9
+        0.00E+00  0.00E+00  0.00E+00  0.00E+00  0.00E+00  0.00E+00  0.00E+00  0.00E+00  0.00E+00
 ET10
+        0.00E+00  0.00E+00  0.00E+00  0.00E+00  0.00E+00  0.00E+00  0.00E+00  0.00E+00  0.00E+00  7.04E-01

 SIGMA - COV MATRIX FOR RANDOM EFFECTS - EPSILONS  ****
         EPS1
 EPS1
+        1.00E+00

 OMEGA - CORR MATRIX FOR RANDOM EFFECTS - ETAS  *******
         ETA1      ETA2      ETA3      ETA4      ETA5      ETA6      ETA7      ETA8      ETA9      ET10
 ETA1
+        0.00E+00
 ETA2
+        0.00E+00  2.22E+00
 ETA3
+        0.00E+00  0.00E+00  0.00E+00
 ETA4
+        0.00E+00  0.00E+00  0.00E+00  0.00E+00
 ETA5
+        0.00E+00  0.00E+00  0.00E+00  0.00E+00  0.00E+00
 ETA6
+        0.00E+00  0.00E+00  0.00E+00  0.00E+00  0.00E+00  5.29E-01
 ETA7
+        0.00E+00  0.00E+00  0.00E+00  0.00E+00  0.00E+00  0.00E+00  0.00E+00
 ETA8
+        0.00E+00  0.00E+00  0.00E+00  0.00E+00  0.00E+00  0.00E+00  0.00E+00  0.00E+00
 ETA9
+        0.00E+00  0.00E+00  0.00E+00  0.00E+00  0.00E+00  0.00E+00  0.00E+00  0.00E+00  0.00E+00
 ET10
+        0.00E+00  0.00E+00  0.00E+00  0.00E+00  0.00E+00  0.00E+00  0.00E+00  0.00E+00  0.00E+00  8.39E-01

 SIGMA - CORR MATRIX FOR RANDOM EFFECTS - EPSILONS  ***
         EPS1
 EPS1
+        1.00E+00
 Elapsed finaloutput time in seconds:     0.07
 #CPUT: Total CPU Time in Seconds,        7.156
