2020-11-04
오후 07:42
$PROB Mouse_liver_2comp
$INPUT ID TIME AMT DV MDV CMT ADDL II SPECIES SEX MULTIPLE DOSE ROUTE FORMULATION TAD BQL LIV WT LVW
$DATA  ..//Mouse_total_lowdose.csv IGNORE=@

$SUBROUTINE ADVAN6 TOL=3

$MODEL NCOMP=4
 COMP(DEPOT, DEFDOSE)
 COMP(LIV)
 COMP(CENT, DEFOBS)
 COMP(PERI)

$PK
 ;---- PK FIXED EFFECT ----

 ;Distribution
 TVCL = THETA(5)
 TVV3 = THETA(6)
 TVV4 = THETA(7)
 TVQ  = THETA(8)

 ;Absorption
 TVKA = THETA(9)
 TVF1 = THETA(10)
 TVCLbile = THETA(11)

 ;Scaling parameter
 TVKp = THETA(12)

 ;Physiological data
 TVV2 = LVW ; Liver weigth (mL)
 TVCLint = 5135 * WT / 1000 * 60 ; Intrinsic clearance (mL/hr)
 TVQH = 26.2 * 60 ; Hepatic blood flow (mL/hr)

 ;Mouse in vitro data
 BP = 1       ; assumed
 fu = 0.135

;---- PK RANDOM EFFECT ----
 CL   = TVCL * EXP(ETA(1))
 V2   = TVV2 * EXP(ETA(2))
 V3   = TVV3 * EXP(ETA(3))
 V4   = TVV4 * EXP(ETA(4))
 Q    = TVQ  * EXP(ETA(5))
 KA   = TVKA * EXP(ETA(6))
 CLint = TVCLint * EXP(ETA(7))
 F1 = TVF1 * EXP(ETA(8))
 QH = TVQH * EXP(ETA(9))
 Kp = TVKp * EXP(ETA(10))
 CLbile = TVCLbile * EXP(ETA(11))

;---- PK PARAMETER RELATIONSHIP ----
 S2   = V2
 S3   = V3
 K34  = Q/V3
 k43  = Q/V4

$DES
 DADT(1) = - KA*A(1) + CLbile*A(2)/V2
 DADT(2) = KA*F1*A(1) - QH*A(2)/V2/Kp - CLint*A(2)/V2*fu + QH*A(3)/V3 - CLbile*A(2)/V2
 DADT(3) = QH*A(2)/V2/Kp - K34*A(3) + K43*A(4) - QH*A(3)/V3
 DADT(4) = K34*A(3) - K43*A(4)

$ERROR
; dose : ng, concentration : ng/mL

 IF (CMT.EQ.2) THEN
 IPRED  = A(2)/V2
 W      = SQRT(THETA(1)**2 + THETA(2)**2 * IPRED**2)
 IRES   = DV - IPRED
 IWRES  = IRES / W
 Y      = IPRED + W * EPS(1)
 ENDIF

 IF (CMT.EQ.3) THEN
 IPRED  = A(3)/V3
 W      = SQRT(THETA(3)**2 + THETA(4)**2 * IPRED**2)
 IRES   = DV - IPRED
 IWRES  = IRES / W
 Y      = IPRED + W * EPS(2)
 ENDIF

$THETA
 ; Error model
 0.0001 FIX
 0.5

 0.0001 FIX
 0.5

 ;Distribution
 0 FIX   ; (5) CL (mL/hr)
 (0, 100)  ; (6) VC (mL)
 (0, 100)  ; (7) VP (mL)
 (0, 5000) ; (8) Q (mL/hr)

 ; Absorption
 (0, 5) ; (9) KA (/h)
 (0, 0.1) ; (10) F1
 (0, 100) ; (11) TVCLbile

 ; Scaling parameter
 (0, 10) ; (12) Kp


$OMEGA
 0 FIX
 0 FIX
 0 FIX
 0 FIX
 0 FIX
 0 FIX
 0 FIX
 0 FIX
 0 FIX
 0 FIX
 0 FIX

$SIGMA
 1 FIX
 1 FIX
$ESTIMATION NOABORT MAXEVAL=9999 METHOD=0 PRINT=10 SIGDIGITS=3

$TABLE ID TIME AMT CMT DV MDV IPRED CWRES IWRES  ONEHEADER NOPRINT  FILE = sdtab001

NM-TRAN MESSAGES
 WARNINGS AND ERRORS (IF ANY) FOR PROBLEM    1
 (WARNING  2) NM-TRAN INFERS THAT THE DATA ARE POPULATION.
 (WARNING  3) THERE MAY BE AN ERROR IN THE ABBREVIATED CODE. THE FOLLOWING
 ONE OR MORE RANDOM VARIABLES ARE DEFINED WITH "IF" STATEMENTS THAT DO NOT
 PROVIDE DEFINITIONS FOR BOTH THE "THEN" AND "ELSE" CASES. IF ALL
 CONDITIONS FAIL, THE VALUES OF THESE VARIABLES WILL BE ZERO.
   IPRED W IRES IWRES Y
 AN ERROR WAS FOUND IN THE CONTROL STATEMENTS.
 THE CHARACTERS IN ERROR ARE:
 ..//Mouse_total_lowdose.csv
   33  INPUT DATA FILE DOES NOT EXIST OR CANNOT BE OPENED.
