2020-11-04
오후 07:40
$PROB Mouse_liver_2comp
$INPUT ID TIME AMT DV MDV CMT ADDL II SPECIES SEX MULTIPLE DOSE ROUTE FORMULATION TAD BQL LIV WT LVW
$DATA  ..//Mouse_total_lowdose.csv IGNORE=@ ACCEPT=(ROUTE.EQ.2)

$SUBROUTINE ADVAN6 TOL=3

$MODEL NCOMP=4
 COMP(DEPOT, DEFDOSE)
 COMP(LIV)
 COMP(CENT, DEFOBS)
 COMP(PERI)

$PK
 ;---- PK FIXED EFFECT ----

 ;Distribution
 TVCL = THETA(5)
 TVV3 = THETA(6)
 TVV4 = THETA(7)
 TVQ  = THETA(8)

 ;Absorption
 TVKA = THETA(9)
 TVF1 = THETA(10)
 TVCLbile = THETA(11)

 ;Scaling parameter
 TVKp = THETA(12)

 ;Physiological data
 TVV2 = LVW ; Liver weigth (mL)
 TVCLint = 5135 * WT / 1000 * 60 ; Intrinsic clearance (mL/hr)
 TVQH = 26.2 * 60 ; Hepatic blood flow (mL/hr)

 ;Mouse in vitro data
 BP = 1       ; assumed
 fu = 0.135

;---- PK RANDOM EFFECT ----
 CL   = TVCL * EXP(ETA(1))
 V2   = TVV2 * EXP(ETA(2))
 V3   = TVV3 * EXP(ETA(3))
 V4   = TVV4 * EXP(ETA(4))
 Q    = TVQ  * EXP(ETA(5))
 KA   = TVKA * EXP(ETA(6))
 CLint = TVCLint * EXP(ETA(7))
 F1 = TVF1 * EXP(ETA(8))
 QH = TVQH * EXP(ETA(9))
 Kp = TVKp * EXP(ETA(10))
 CLbile = TVCLbile * EXP(ETA(11))

;---- PK PARAMETER RELATIONSHIP ----
 S2   = V2
 S3   = V3
 K34  = Q/V3
 k43  = Q/V4

$DES
 DADT(1) = - KA*A(1) + CLbile*A(2)/V2
 DADT(2) = KA*F1*A(1) - QH*A(2)/V2/Kp - CLint*A(2)/V2*fu + QH*A(3)/V3 - CLbile*A(2)/V2
 DADT(3) = QH*A(2)/V2/Kp - K34*A(3) + K43*A(4) - QH*A(3)/V3
 DADT(4) = K34*A(3) - K43*A(4)

$ERROR
; dose : ng, concentration : ng/mL

 IF (CMT.EQ.2) THEN
 IPRED  = A(2)/V2
 W      = SQRT(THETA(1)**2 + THETA(2)**2 * IPRED**2)
 IRES   = DV - IPRED
 IWRES  = IRES / W
 Y      = IPRED + W * EPS(1)
 ENDIF

 IF (CMT.EQ.3) THEN
 IPRED  = A(3)/V3
 W      = SQRT(THETA(3)**2 + THETA(4)**2 * IPRED**2)
 IRES   = DV - IPRED
 IWRES  = IRES / W
 Y      = IPRED + W * EPS(2)
 ENDIF

$THETA
 ; Error model
 0.0001 FIX
 0.5

 0.0001 FIX
 0.5

 ;Distribution
 0 FIX   ; (5) CL (mL/hr)
 (0, 100)  ; (6) VC (mL)
 (0, 100)  ; (7) VP (mL)
 (0, 5000) ; (8) Q (mL/hr)

 ; Absorption
 (0, 5) ; (9) KA (/h)
 (0, 0.1) ; (10) F1
 (0, 100) ; (11) TVCLbile

 ; Scaling parameter
 (0, 10) ; (12) Kp


$OMEGA
 0 FIX
 0 FIX
 0 FIX
 0 FIX
 0 FIX
 0 FIX
 0 FIX
 0 FIX
 0 FIX
 0 FIX
 0 FIX

$SIGMA
 1 FIX
 1 FIX
$ESTIMATION NOABORT MAXEVAL=9999 METHOD=0 PRINT=10 SIGDIGITS=3

$TABLE ID TIME AMT CMT DV MDV IPRED CWRES IWRES  ONEHEADER NOPRINT  FILE = sdtab001

NM-TRAN MESSAGES
 WARNINGS AND ERRORS (IF ANY) FOR PROBLEM    1
 (WARNING  2) NM-TRAN INFERS THAT THE DATA ARE POPULATION.
 (WARNING  3) THERE MAY BE AN ERROR IN THE ABBREVIATED CODE. THE FOLLOWING
 ONE OR MORE RANDOM VARIABLES ARE DEFINED WITH "IF" STATEMENTS THAT DO NOT
 PROVIDE DEFINITIONS FOR BOTH THE "THEN" AND "ELSE" CASES. IF ALL
 CONDITIONS FAIL, THE VALUES OF THESE VARIABLES WILL BE ZERO.
   IPRED W IRES IWRES Y

1NONLINEAR MIXED EFFECTS MODEL PROGRAM (NONMEM) VERSION 7.4.1
 ORIGINALLY DEVELOPED BY STUART BEAL, LEWIS SHEINER, AND ALISON BOECKMANN
 CURRENT DEVELOPERS ARE ROBERT BAUER, ICON DEVELOPMENT SOLUTIONS,
 AND ALISON BOECKMANN. IMPLEMENTATION, EFFICIENCY, AND STANDARDIZATION
 PERFORMED BY NOUS INFOSYSTEMS.
 PROBLEM NO.:         1
 Mouse_liver_2comp
 TOT. NO. OF OBS RECS:       44
 TOT. NO. OF INDIVIDUALS:        6
 GENERAL NONLINEAR KINETICS MODEL (DVERK1, ADVAN6)
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 #TBLN:      1
 #METH: First Order
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
 #TERM:
0MINIMIZATION SUCCESSFUL
 NO. OF FUNCTION EVALUATIONS USED:     2641
 NO. OF SIG. DIGITS IN FINAL EST.:  3.9
0PARAMETER ESTIMATE IS NEAR ITS BOUNDARY
 THIS MUST BE ADDRESSED BEFORE THE COVARIANCE STEP CAN BE IMPLEMENTED

 TOTAL DATA POINTS NORMALLY DISTRIBUTED (N):           44
 N*LOG(2PI) CONSTANT TO OBJECTIVE FUNCTION:    80.866590922011198
 OBJECTIVE FUNCTION VALUE WITHOUT CONSTANT:    529.28829737482761
 OBJECTIVE FUNCTION VALUE WITH CONSTANT:       610.15488829683886
 REPORTED OBJECTIVE FUNCTION DOES NOT CONTAIN CONSTANT

 TOTAL EFFECTIVE ETAS (NIND*NETA):                             0


 #TERE:
 Elapsed estimation  time in seconds:    49.98
 Elapsed postprocess time in seconds:     0.06

 ********************                                   FIRST ORDER                                  ********************
 #OBJT:**************                       MINIMUM VALUE OF OBJECTIVE FUNCTION                      ********************
 #OBJV:********************************************      529.288       **************************************************

 ********************                                   FIRST ORDER                                  ********************
 ********************                             FINAL PARAMETER ESTIMATE                           ********************

 THETA - VECTOR OF FIXED EFFECTS PARAMETERS   *********
         TH 1      TH 2      TH 3      TH 4      TH 5      TH 6      TH 7      TH 8      TH 9      TH10      TH11      TH12
         1.00E-04  5.06E+01  1.00E-04  5.42E+00  0.00E+00  9.31E+01  4.48E+02  2.75E+03  5.00E-02  1.49E+03  1.00E+00  7.40E+01

 OMEGA - COV MATRIX FOR RANDOM EFFECTS - ETAS  ********
         ETA1      ETA2      ETA3      ETA4      ETA5      ETA6      ETA7      ETA8      ETA9      ET10      ET11
 ETA1
+        0.00E+00
 ETA2
+        0.00E+00  0.00E+00
 ETA3
+        0.00E+00  0.00E+00  0.00E+00
 ETA4
+        0.00E+00  0.00E+00  0.00E+00  0.00E+00
 ETA5
+        0.00E+00  0.00E+00  0.00E+00  0.00E+00  0.00E+00
 ETA6
+        0.00E+00  0.00E+00  0.00E+00  0.00E+00  0.00E+00  0.00E+00
 ETA7
+        0.00E+00  0.00E+00  0.00E+00  0.00E+00  0.00E+00  0.00E+00  0.00E+00
 ETA8
+        0.00E+00  0.00E+00  0.00E+00  0.00E+00  0.00E+00  0.00E+00  0.00E+00  0.00E+00
 ETA9
+        0.00E+00  0.00E+00  0.00E+00  0.00E+00  0.00E+00  0.00E+00  0.00E+00  0.00E+00  0.00E+00
 ET10
+        0.00E+00  0.00E+00  0.00E+00  0.00E+00  0.00E+00  0.00E+00  0.00E+00  0.00E+00  0.00E+00  0.00E+00
 ET11
+        0.00E+00  0.00E+00  0.00E+00  0.00E+00  0.00E+00  0.00E+00  0.00E+00  0.00E+00  0.00E+00  0.00E+00  0.00E+00

 SIGMA - COV MATRIX FOR RANDOM EFFECTS - EPSILONS  ****
         EPS1      EPS2
 EPS1
+        1.00E+00
 EPS2
+        0.00E+00  1.00E+00

 OMEGA - CORR MATRIX FOR RANDOM EFFECTS - ETAS  *******
         ETA1      ETA2      ETA3      ETA4      ETA5      ETA6      ETA7      ETA8      ETA9      ET10      ET11
 ETA1
+        0.00E+00
 ETA2
+        0.00E+00  0.00E+00
 ETA3
+        0.00E+00  0.00E+00  0.00E+00
 ETA4
+        0.00E+00  0.00E+00  0.00E+00  0.00E+00
 ETA5
+        0.00E+00  0.00E+00  0.00E+00  0.00E+00  0.00E+00
 ETA6
+        0.00E+00  0.00E+00  0.00E+00  0.00E+00  0.00E+00  0.00E+00
 ETA7
+        0.00E+00  0.00E+00  0.00E+00  0.00E+00  0.00E+00  0.00E+00  0.00E+00
 ETA8
+        0.00E+00  0.00E+00  0.00E+00  0.00E+00  0.00E+00  0.00E+00  0.00E+00  0.00E+00
 ETA9
+        0.00E+00  0.00E+00  0.00E+00  0.00E+00  0.00E+00  0.00E+00  0.00E+00  0.00E+00  0.00E+00
 ET10
+        0.00E+00  0.00E+00  0.00E+00  0.00E+00  0.00E+00  0.00E+00  0.00E+00  0.00E+00  0.00E+00  0.00E+00
 ET11
+        0.00E+00  0.00E+00  0.00E+00  0.00E+00  0.00E+00  0.00E+00  0.00E+00  0.00E+00  0.00E+00  0.00E+00  0.00E+00

 SIGMA - CORR MATRIX FOR RANDOM EFFECTS - EPSILONS  ***
         EPS1      EPS2
 EPS1
+        1.00E+00
 EPS2
+        0.00E+00  1.00E+00
 Elapsed finaloutput time in seconds:     0.01
 #CPUT: Total CPU Time in Seconds,       49.141
