$PROB Simple_2comp
$INPUT ID TIME AMT DV MDV CMT ADDL II RATE SPECIES SEX MULTIPLE DOSE ROUTE FORMULATION
$DATA  C:\Users\admin\Documents\GitHub\Autophage\PKTK_dataset_plasma_zero.csv IGNORE=@ IGNORE=(SPECIES.NE.1)

$SUBROUTINE ADVAN3 TRANS4

$PK
;---- FIXED EFFECT DEFINITION ----
 TVCL = THETA(3)
 TVV1 = THETA(4)
 TVV2 = THETA(5)
 TVQ  = THETA(6)
 TVD1 = THETA(7)

;---- RANDOM EFFECT DEFINITION ----

 CL   = TVCL * EXP(ETA(1))
 V1   = TVV1 * EXP(ETA(2))
 V2   = TVV2 * EXP(ETA(3))
 Q    = TVQ  * EXP(ETA(4))
 D1   = TVD1 * EXP(ETA(5))
 F1   = THETA(8) - THETA(10) * DOSE / (THETA(9) + DOSE) * EXP(ETA(6))
 S1 = V1

$ERROR
 IPRED  = F
 W      = SQRT(THETA(1)**2 + THETA(2)**2 * IPRED**2)
 IRES   = DV - IPRED
 IWRES  = IRES / W
 Y      = IPRED + W * EPS(1)

$THETA
 0.0001 FIX
 0.5
 (0, 10, 30)
 (0, 30, 100)
 (0, 50, 500)
 (0, 5, 200)
 (0, 0.5)

 (0, 1)
 (0, 50)
 (0, 1)
$OMEGA
 0 FIX
 0 FIX
 0 FIX
 0 FIX
 0 FIX
 0 FIX
$SIGMA
 1 FIX

$ESTIMATION NOABORT MAXEVAL=9999 METHOD=1 INTER PRINT=10 SIGDIGITS=3

$TABLE ID TIME AMT DV MDV IPRED CWRES IWRES  ONEHEADER NOPRINT FILE = sdtab010
$TABLE ID CL V1 V2 Q F1 DOSE                      ONEHEADER NOPRINT NOAPPEND FILE = patab010
