2020-10-27
07:20 PM
$PROB Simple_2comp
$INPUT ID TIME AMT DV MDV CMT ADDL II SPECIES SEX MULTIPLE DOSE ROUTE FORMULATION
$DATA  C:\Users\admin\Documents\GitHub\Autophage\PKTK_dataset_plasma.csv IGNORE=@ IGNORE=(SPECIES.NE.1)

$SUBROUTINE ADVAN4 TRANS4

$PK
;---- FIXED EFFECT DEFINITION ----
 TVCL = THETA(3)
 TVV2 = THETA(4)
 TVV3 = THETA(5)
 TVQ  = THETA(6)
 TVKA = THETA(7)

;---- RANDOM EFFECT DEFINITION ----

 CL   = TVCL * EXP(ETA(1))
 V2   = TVV2 * EXP(ETA(2))
 V3   = TVV3 * EXP(ETA(3))
 Q    = TVQ  * EXP(ETA(4))
 KA   = TVKA * EXP(ETA(5))
 F1   = THETA(8) - THETA(10) * DOSE / (THETA(9) + DOSE) * EXP(ETA(6))
 S2 = V2

$ERROR
 IPRED  = F
 W      = SQRT(THETA(1)**2 + THETA(2)**2 * IPRED**2)
 IRES   = DV - IPRED
 IWRES  = IRES / W
 Y      = IPRED + W * EPS(1)

$THETA
 0.0001 FIX
 0.5
 (0, 10, 30)
 (0, 30, 100)
 (0, 50, 500)
 (0, 5, 200)
 (0, 1.5, 20)

 (0, 1)
 (0, 50)
 (0, 1)
$OMEGA
 0.1
 0 FIX
 0 FIX
 0 FIX
 0 FIX
 0.1
$SIGMA
 1 FIX

$ESTIMATION NOABORT MAXEVAL=9999 METHOD=1 INTER PRINT=10 SIGDIGITS=3

$TABLE ID TIME AMT DV MDV IPRED CWRES IWRES  ONEHEADER NOPRINT FILE = sdtab005_6
$TABLE ID CL V2 V3 Q KA F1 DOSE                      ONEHEADER NOPRINT NOAPPEND FILE = patab005_6

NM-TRAN MESSAGES
 WARNINGS AND ERRORS (IF ANY) FOR PROBLEM    1
 (WARNING  2) NM-TRAN INFERS THAT THE DATA ARE POPULATION.
 LIM VALUES MAXLIM ASSESSED BY NMTRAN: 1,2,3,4,5,6,7,8,10,11,13,15,16

1NONLINEAR MIXED EFFECTS MODEL PROGRAM (NONMEM) VERSION 7.4.3
 ORIGINALLY DEVELOPED BY STUART BEAL, LEWIS SHEINER, AND ALISON BOECKMANN
 CURRENT DEVELOPERS ARE ROBERT BAUER, ICON DEVELOPMENT SOLUTIONS,
 AND ALISON BOECKMANN. IMPLEMENTATION, EFFICIENCY, AND STANDARDIZATION
 PERFORMED BY NOUS INFOSYSTEMS.
 PROBLEM NO.:         1
 Simple_2comp
 TOT. NO. OF OBS RECS:      494
 TOT. NO. OF INDIVIDUALS:       78
 TWO COMPARTMENT MODEL WITH FIRST-ORDER ABSORPTION (ADVAN4)
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 #TBLN:      1
 #METH: First Order Conditional Estimation with Interaction
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
0PRED EXIT CODE = 1
0INDIVIDUAL NO.      16   ID= 1.60000000000000E+01   (WITHIN-INDIVIDUAL) DATA REC NO.   1
 THETA=
  1.00E-04   5.00E-01   1.00E+01   3.00E+01   5.00E+01   5.00E+00   1.50E+00   1.00E+00   5.00E+01   1.00E+00
 ETA=
  6.74E-02   0.00E+00   0.00E+00   0.00E+00   0.00E+00   3.61E-01
 OCCURS DURING SEARCH FOR ETA AT A NONZERO VALUE OF ETA
 PK PARAMETER FOR BIOAVAILABILITY FRACTION IS NEGATIVE
0PROGRAM TERMINATED BY OBJ
 MESSAGE ISSUED FROM ESTIMATION STEP
 AT INITIAL OBJ. FUNCTION EVALUATION

0PRED EXIT CODE = 1
0INDIVIDUAL NO.      21   ID= 2.10000000000000E+01   (WITHIN-INDIVIDUAL) DATA REC NO.   1
 THETA=
  1.00E-04   5.00E-01   1.00E+01   3.00E+01   5.00E+01   5.00E+00   1.50E+00   1.00E+00   5.00E+01   1.00E+00
 ETA=
  3.86E-02   0.00E+00   0.00E+00   0.00E+00   0.00E+00   1.93E-01
 OCCURS DURING SEARCH FOR ETA AT A NONZERO VALUE OF ETA
 PK PARAMETER FOR BIOAVAILABILITY FRACTION IS NEGATIVE

 #TERM:

 TOTAL DATA POINTS NORMALLY DISTRIBUTED (N):          336
 N*LOG(2PI) CONSTANT TO OBJECTIVE FUNCTION:    617.52669431354002
 OBJECTIVE FUNCTION VALUE WITHOUT CONSTANT:   1.34078079299425956E+154
 OBJECTIVE FUNCTION VALUE WITH CONSTANT:      1.34078079299425956E+154
 REPORTED OBJECTIVE FUNCTION DOES NOT CONTAIN CONSTANT

 TOTAL EFFECTIVE ETAS (NIND*NETA):                           103


 #TERE:
 Elapsed estimation  time in seconds:     0.05
 #CPUT: Total CPU Time in Seconds,        0.172
