2020-11-20
오후 09:15
$PROB Mouse_liver_2comp
$INPUT ID TIME AMT DV MDV SKIP ADDL II SPECIES DOSE ROUTE FORMULATION TAD BQL WT LVW CMT RATE
$DATA  ..//Plasma_individual4_only_zero.csv IGNORE=@
$SUBROUTINE ADVAN3 TRANS4

$PK
 ;---- PK FIXED EFFECT ----
 ;Distribution
 CL = THETA(3)* EXP(ETA(1))
 V1 = THETA(4)* EXP(ETA(2))
 V2 = THETA(5)* EXP(ETA(3))
 Q  = THETA(6)* EXP(ETA(4))
 F1 = 1
 IF(ROUTE.EQ.2) F1 = THETA(7) * EXP(ETA(5))

 D1 = THETA(8)*EXP(ETA(6))

;---- PK PARAMETER RELATIONSHIP ----
 S1   = V1


$ERROR

 IPRED  = A(1)/S1
 W      = SQRT(THETA(1)**2 + THETA(2)**2 * IPRED**2)
 IRES   = DV - IPRED
 IWRES  = IRES / W
 Y      = IPRED + W * EPS(1)

$THETA
 ; Error model
 0.0001 FIX
 0.5
 (0, 100) ; (3) CL (mL/hr)
 (0, 100)  ; (4) VC (mL)
 (0, 1000)  ; (5) VP (mL)
 (0, 50)  ; (6) Q (mL/hr)
 (0, 0.5) ; (7) F1
 (0, 1) ; (8) KA(first)


$OMEGA
 0 FIX
 0 FIX
 0 FIX
 0 FIX
 0 FIX
 0 FIX

$SIGMA
 1 FIX

$ESTIMATION NOABORT MAXEVAL=9999 METHOD=0 PRINT=10 SIGDIGITS=3

$TABLE ID TIME AMT CMT DV MDV IPRED CWRES IWRES ROUTE DOSE ONEHEADER NOPRINT  FILE = sdtab1_2.txt

NM-TRAN MESSAGES
 WARNINGS AND ERRORS (IF ANY) FOR PROBLEM    1
 (WARNING  2) NM-TRAN INFERS THAT THE DATA ARE POPULATION.
 (DATA WARNING   4) RECORD        28, DATA ITEM   4, CONTENTS:
 THE DV DATA ITEM IS NULL, BUT THE MDV DATA ITEM IS 0 AND NO $SIMULATION
 RECORD IS PRESENT.

1NONLINEAR MIXED EFFECTS MODEL PROGRAM (NONMEM) VERSION 7.4.1
 ORIGINALLY DEVELOPED BY STUART BEAL, LEWIS SHEINER, AND ALISON BOECKMANN
 CURRENT DEVELOPERS ARE ROBERT BAUER, ICON DEVELOPMENT SOLUTIONS,
 AND ALISON BOECKMANN. IMPLEMENTATION, EFFICIENCY, AND STANDARDIZATION
 PERFORMED BY NOUS INFOSYSTEMS.
 PROBLEM NO.:         1
 Mouse_liver_2comp
 TOT. NO. OF OBS RECS:      344
 TOT. NO. OF INDIVIDUALS:      204
 TWO COMPARTMENT MODEL (ADVAN3)
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 #TBLN:      1
 #METH: First Order
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
 #TERM:
0MINIMIZATION SUCCESSFUL
 NO. OF FUNCTION EVALUATIONS USED:      268
 NO. OF SIG. DIGITS IN FINAL EST.:  3.2

 TOTAL DATA POINTS NORMALLY DISTRIBUTED (N):          344
 N*LOG(2PI) CONSTANT TO OBJECTIVE FUNCTION:    632.22971084481480
 OBJECTIVE FUNCTION VALUE WITHOUT CONSTANT:   -746.25098473373794
 OBJECTIVE FUNCTION VALUE WITH CONSTANT:      -114.02127388892313
 REPORTED OBJECTIVE FUNCTION DOES NOT CONTAIN CONSTANT

 TOTAL EFFECTIVE ETAS (NIND*NETA):                             0


 #TERE:
 Elapsed estimation  time in seconds:     0.27
 Elapsed postprocess time in seconds:     0.01

 ********************                                   FIRST ORDER                                  ********************
 #OBJT:**************                       MINIMUM VALUE OF OBJECTIVE FUNCTION                      ********************
 #OBJV:********************************************     -746.251       **************************************************

 ********************                                   FIRST ORDER                                  ********************
 ********************                             FINAL PARAMETER ESTIMATE                           ********************

 THETA - VECTOR OF FIXED EFFECTS PARAMETERS   *********
         TH 1      TH 2      TH 3      TH 4      TH 5      TH 6      TH 7      TH 8
         1.00E-04  1.42E+00  2.38E+02  3.24E+01  9.16E+02  8.27E+02  2.51E-01  5.89E+00

 OMEGA - COV MATRIX FOR RANDOM EFFECTS - ETAS  ********
         ETA1      ETA2      ETA3      ETA4      ETA5      ETA6
 ETA1
+        0.00E+00
 ETA2
+        0.00E+00  0.00E+00
 ETA3
+        0.00E+00  0.00E+00  0.00E+00
 ETA4
+        0.00E+00  0.00E+00  0.00E+00  0.00E+00
 ETA5
+        0.00E+00  0.00E+00  0.00E+00  0.00E+00  0.00E+00
 ETA6
+        0.00E+00  0.00E+00  0.00E+00  0.00E+00  0.00E+00  0.00E+00

 SIGMA - COV MATRIX FOR RANDOM EFFECTS - EPSILONS  ****
         EPS1
 EPS1
+        1.00E+00

 OMEGA - CORR MATRIX FOR RANDOM EFFECTS - ETAS  *******
         ETA1      ETA2      ETA3      ETA4      ETA5      ETA6
 ETA1
+        0.00E+00
 ETA2
+        0.00E+00  0.00E+00
 ETA3
+        0.00E+00  0.00E+00  0.00E+00
 ETA4
+        0.00E+00  0.00E+00  0.00E+00  0.00E+00
 ETA5
+        0.00E+00  0.00E+00  0.00E+00  0.00E+00  0.00E+00
 ETA6
+        0.00E+00  0.00E+00  0.00E+00  0.00E+00  0.00E+00  0.00E+00

 SIGMA - CORR MATRIX FOR RANDOM EFFECTS - EPSILONS  ***
         EPS1
 EPS1
+        1.00E+00
 Elapsed finaloutput time in seconds:     0.09
 #CPUT: Total CPU Time in Seconds,        0.469
