2017-08-24
ｿﾀﾈﾄ 02:28
$PROB BQL WORKSHOP

$INPUT ID TIME AMT DV MDV BQL2 BQL3;

$DATA ONECMTBQL.csv IGNORE=@ IGNORE(BQL2=1)
$SUBROUTINE ADVAN2 TRANS2

$PK
;---- FIXED EFFECT DEFINITION ----
 TVCL = THETA(1)
 TVV = THETA(2)
 TVKA = THETA(3)


;---- RANDOM EFFECT DEFINITION ----

 CL    = TVCL * EXP(ETA(1))
 V     = TVV * EXP(ETA(2))
 KA    = TVKA * EXP(ETA(3))

 S1    = V/1000
 K     = CL/V

$ERROR
  LLOQ  = 2.0
  IPRED = F
  IRES = DV-IPRED
  W = SQRT(THETA(4)**2 + THETA(5)**2 * IPRED**2)
  IWRES = IRES/W
  Y = IPRED + W*EPS(1)


$THETA
 (0, 10, 50)
 (0, 50, 200)
 3 FIX
 0.001 FIX
 0.2

$OMEGA
 0.01
 0.01
 0.0 FIX

$SIGMA
 1 FIX

$ESTIMATION NOABORT MAXEVAL=9999 METHOD=1 INTER SLOW PRINT=10 SIGDIGITS=5
$COV PRINT=E
$TABLE ID TIME AMT DV MDV IPRED CWRES IWRES BQL2 BQL3 ONEHEADER NOPRINT FILE = sdtab1
$TABLE ID ETA(1) ETA(2) ETA(3) CL V KA ONEHEADER NOPRINT NOAPPEND FILE = patab1

NM-TRAN MESSAGES
 WARNINGS AND ERRORS (IF ANY) FOR PROBLEM    1
 (WARNING  2) NM-TRAN INFERS THAT THE DATA ARE POPULATION.
 (DATA WARNING   4) RECORD       114, DATA ITEM   4, CONTENTS:
 THE DV DATA ITEM IS NULL, BUT THE MDV DATA ITEM IS 0 AND NO $SIMULATION
 RECORD IS PRESENT.

1NONLINEAR MIXED EFFECTS MODEL PROGRAM (NONMEM) VERSION 7.3.0
 ORIGINALLY DEVELOPED BY STUART BEAL, LEWIS SHEINER, AND ALISON BOECKMANN
 CURRENT DEVELOPERS ARE ROBERT BAUER, ICON DEVELOPMENT SOLUTIONS,
 AND ALISON BOECKMANN. IMPLEMENTATION, EFFICIENCY, AND STANDARDIZATION
 PERFORMED BY NOUS INFOSYSTEMS.
 PROBLEM NO.:         1
 BQL WORKSHOP
 TOT. NO. OF OBS RECS:       98
 TOT. NO. OF INDIVIDUALS:     17
 ONE COMPARTMENT MODEL WITH FIRST-ORDER ABSORPTION (ADVAN2)
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 #TBLN:      1
 #METH: First Order Conditional Estimation with Interaction
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
 #TERM:
0MINIMIZATION TERMINATED
 DUE TO ROUNDING ERRORS (ERROR=134)
 NO. OF FUNCTION EVALUATIONS USED:      184
 NO. OF SIG. DIGITS IN FINAL EST.:  5.0

 ETABAR IS THE ARITHMETIC MEAN OF THE ETA-ESTIMATES,
 AND THE P-VALUE IS GIVEN FOR THE NULL HYPOTHESIS THAT THE TRUE MEAN IS 0.

 ETABAR:         1.2540E-02 -8.1108E-03  0.0000E+00
 SE:             3.4482E-02  2.2303E-02  0.0000E+00
 N:                      17          17          17

 P VAL.:         7.1611E-01  7.1611E-01  1.0000E+00

 ETAshrink(%):   3.6224E+01  4.8709E+01  1.0000E+02
 EBVshrink(%):   4.0727E+01  5.2331E+01  0.0000E+00
 EPSshrink(%):   3.9894E+00

 #TERE:
 Elapsed estimation time in seconds:     1.65

 ********************               FIRST ORDER CONDITIONAL ESTIMATION WITH INTERACTION              ********************
 #OBJT:**************                       MINIMUM VALUE OF OBJECTIVE FUNCTION                      ********************
 #OBJV:********************************************      257.801       **************************************************

 ********************               FIRST ORDER CONDITIONAL ESTIMATION WITH INTERACTION              ********************
 ********************                             FINAL PARAMETER ESTIMATE                           ********************

 THETA - VECTOR OF FIXED EFFECTS PARAMETERS   *********
         TH 1      TH 2      TH 3      TH 4      TH 5
         6.45E+00  3.83E+01  3.00E+00  1.00E-03  3.80E-01

 OMEGA - COV MATRIX FOR RANDOM EFFECTS - ETAS  ********
            ETA1      ETA2      ETA3
 ETA1
+        5.28E-02
 ETA2
+        0.00E+00  3.42E-02
 ETA3
+        0.00E+00  0.00E+00  0.00E+00

 SIGMA - COV MATRIX FOR RANDOM EFFECTS - EPSILONS  ****
            EPS1
 EPS1
+        1.00E+00

 OMEGA - CORR MATRIX FOR RANDOM EFFECTS - ETAS  *******
            ETA1      ETA2      ETA3
 ETA1
+        2.30E-01
 ETA2
+        0.00E+00  1.85E-01
 ETA3
+        0.00E+00  0.00E+00  0.00E+00

 SIGMA - CORR MATRIX FOR RANDOM EFFECTS - EPSILONS  ***
            EPS1
 EPS1
+        1.00E+00
 #CPUT: Total CPU Time in Seconds,        0.718
