2017-08-24
ｿﾀﾈﾄ 03:36
$PROB BQL WORKSHOP

$INPUT ID TIME AMT DV MDV BQL2 BQL3 ;

$DATA ONECMTBQL.csv IGNORE=@ IGNORE(BQL2=1)
$SUBROUTINE ADVAN2 TRANS2

$PK
;---- FIXED EFFECT DEFINITION ----
 TVCL = THETA(1)
 TVV = THETA(2)
 TVKA = THETA(3)


;---- RANDOM EFFECT DEFINITION ----

 CL    = TVCL * EXP(ETA(1))
 V     = TVV * EXP(ETA(2))
 KA    = TVKA * EXP(ETA(3))

 S1    = V/1000
 K     = CL/V

$ERROR
  YLO  = 2.0
  PRB   = PR_Y          ; PR_Y (PRB) is probability that DV is > LLOQ
  IPRED = F
  IRES = DV-IPRED
  W = SQRT(THETA(4)**2 + THETA(5)**2 * IPRED**2)
  IWRES = IRES/W
  Y = IPRED + W*EPS(1)


$THETA
 (0, 10, 60)
 (0, 50, 200)
 3 FIX
 0.001 FIX
 0.2

$OMEGA
 0.01
 0.01
 0.0 FIX

$SIGMA
 1 FIX

$ESTIMATION NOABORT MAXEVAL=9999 METHOD=1 INTER NUMERICAL LAPLACIAN SLOW PRINT=10 SIGDIGITS=5
$COV PRINT=E
$TABLE ID TIME AMT DV MDV IPRED CWRES IWRES BQL2 BQL3 ONEHEADER NOPRINT FILE = sdtab2
$TABLE ID ETA(1) ETA(2) ETA(3) CL V KA ONEHEADER NOPRINT NOAPPEND FILE = patab2

NM-TRAN MESSAGES
 WARNINGS AND ERRORS (IF ANY) FOR PROBLEM    1
 (WARNING  2) NM-TRAN INFERS THAT THE DATA ARE POPULATION.
 (DATA WARNING   4) RECORD       114, DATA ITEM   4, CONTENTS:
 THE DV DATA ITEM IS NULL, BUT THE MDV DATA ITEM IS 0 AND NO $SIMULATION
 RECORD IS PRESENT.

1NONLINEAR MIXED EFFECTS MODEL PROGRAM (NONMEM) VERSION 7.3.0
 ORIGINALLY DEVELOPED BY STUART BEAL, LEWIS SHEINER, AND ALISON BOECKMANN
 CURRENT DEVELOPERS ARE ROBERT BAUER, ICON DEVELOPMENT SOLUTIONS,
 AND ALISON BOECKMANN. IMPLEMENTATION, EFFICIENCY, AND STANDARDIZATION
 PERFORMED BY NOUS INFOSYSTEMS.
 PROBLEM NO.:         1
 BQL WORKSHOP
 TOT. NO. OF OBS RECS:       98
 TOT. NO. OF INDIVIDUALS:     17
 ONE COMPARTMENT MODEL WITH FIRST-ORDER ABSORPTION (ADVAN2)
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 #TBLN:      1
 #METH: Laplacian Conditional Estimation with Interaction
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
0PROGRAM TERMINATED BY OBJ
 ERROR IN CELS   WITH INDIVIDUAL      17   ID= 0.00000000000000E+00
 OBSERVATION IS OUTSIDE LIMITS
 MESSAGE ISSUED FROM ESTIMATION STEP
 AT INITIAL OBJ. FUNCTION EVALUATION

 #TERM:

 #TERE:
 Elapsed estimation time in seconds:     0.11
 #CPUT: Total CPU Time in Seconds,        0.094
