2017-08-24
ｿﾀﾈﾄ 01:25
$PROB BQL WORKSHOP

$INPUT ID TIME AMT DV MDV BQL2 BQL3 ;

$DATA ONECMTBQL.csv IGNORE=@ ;
$SUBROUTINE ADVAN2 TRANS2

$PK
;---- FIXED EFFECT DEFINITION ----
 TVCL = THETA(1)
 TVV = THETA(2)
 TVKA = THETA(3)


;---- RANDOM EFFECT DEFINITION ----

 CL    = TVCL * EXP(ETA(1))
 V     = TVV * EXP(ETA(2))
 KA    = TVKA * EXP(ETA(3))

 S1    = V/1000
 K     = CL/V

$ERROR
  LLOQ  = 2.0
  IPRED = F
  IRES = DV-IPRED
  W = SQRT(THETA(4)**2 + THETA(5)**2 * IPRED**2)
  IWRES = IRES/W

  DUM  = (LLOQ-IPRED)/W

  CO1  = 0.4361836
  CO2  =-0.1201676
  CO3  = 0.9372980
  CO4  = 0.33267
  TMP1 = EXP(-.5*DUM**2)/SQRT(2*3.14159265)
  TMP2 = 1/(1+ABS(DUM)*CO4)
  TMP3 = TMP1*(CO1*TMP2+CO2*TMP2**2+CO3*TMP2**3)

  IF(DUM.GT.0) THEN
    DUM2=1-TMP3
  ELSE
    DUM2=TMP3
  ENDIF

  IF(DV .LT. LLOQ) THEN
    F_FLAG=1
    Y = DUM2
  ELSE
    F_FLAG=0
    Y = IPRED + W*EPS(1)
  ENDIF

$THETA
 (0, 10, 60)
 (0, 50, 200)
 3 FIX
 0.001 FIX
 0.2

$OMEGA
 0.01
 0.01
 0.0 FIX

$SIGMA
 1 FIX

$ESTIMATION NOABORT MAXEVAL=9999 METHOD=1 INTER NUMERICAL LAPLACIAN SLOW PRINT=10 SIGDIGITS=5
$COV PRINT=E
$TABLE ID TIME AMT DV MDV IPRED CWRES IWRES BQL2 BQL3 ONEHEADER NOPRINT FILE = sdtab3
$TABLE ID ETA(1) ETA(2) ETA(3) CL V KA ONEHEADER NOPRINT NOAPPEND FILE = patab3

NM-TRAN MESSAGES
 WARNINGS AND ERRORS (IF ANY) FOR PROBLEM    1
 (WARNING  2) NM-TRAN INFERS THAT THE DATA ARE POPULATION.
 (WARNING  26) THE DERIVATIVE OF THE ABSOLUTE VALUE OF A RANDOM VARIABLE IS
 BEING COMPUTED. IF THE ABSOLUTE VALUE AFFECTS THE VALUE OF THE OBJECTIVE
 FUNCTION, THE USER SHOULD ENSURE THAT THE RANDOM VARIABLE IS ALWAYS
 POSITIVE OR ALWAYS NEGATIVE.
 (DATA WARNING   4) RECORD       161, DATA ITEM   4, CONTENTS:
 THE DV DATA ITEM IS NULL, BUT THE MDV DATA ITEM IS 0 AND NO $SIMULATION
 RECORD IS PRESENT.

1NONLINEAR MIXED EFFECTS MODEL PROGRAM (NONMEM) VERSION 7.3.0
 ORIGINALLY DEVELOPED BY STUART BEAL, LEWIS SHEINER, AND ALISON BOECKMANN
 CURRENT DEVELOPERS ARE ROBERT BAUER, ICON DEVELOPMENT SOLUTIONS,
 AND ALISON BOECKMANN. IMPLEMENTATION, EFFICIENCY, AND STANDARDIZATION
 PERFORMED BY NOUS INFOSYSTEMS.
 PROBLEM NO.:         1
 BQL WORKSHOP
 TOT. NO. OF OBS RECS:      145
 TOT. NO. OF INDIVIDUALS:     17
 ONE COMPARTMENT MODEL WITH FIRST-ORDER ABSORPTION (ADVAN2)
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 #TBLN:      1
 #METH: Laplacian Conditional Estimation with Interaction
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
 #TERM:
0MINIMIZATION TERMINATED
 DUE TO ROUNDING ERRORS (ERROR=134)
 NO. OF FUNCTION EVALUATIONS USED:      232
 NO. OF SIG. DIGITS IN FINAL EST.:  3.0

 ETABAR IS THE ARITHMETIC MEAN OF THE ETA-ESTIMATES,
 AND THE P-VALUE IS GIVEN FOR THE NULL HYPOTHESIS THAT THE TRUE MEAN IS 0.

 ETABAR:         5.0437E-03 -3.5267E-02  0.0000E+00
 SE:             9.3277E-03  6.5223E-02  0.0000E+00
 N:                      17          17          17

 P VAL.:         5.8870E-01  5.8870E-01  1.0000E+00

 ETAshrink(%):   6.7930E+01  1.5198E+01  1.0000E+02
 EBVshrink(%):   6.9109E+01  1.8315E+01  0.0000E+00
 EPSshrink(%):   1.1726E+01

 #TERE:
 Elapsed estimation time in seconds:     1.86

 ********************                LAPLACIAN CONDITIONAL ESTIMATION WITH INTERACTION               ********************
 #OBJT:**************                       MINIMUM VALUE OF OBJECTIVE FUNCTION                      ********************
 #OBJV:********************************************      331.190       **************************************************

 ********************                LAPLACIAN CONDITIONAL ESTIMATION WITH INTERACTION               ********************
 ********************                             FINAL PARAMETER ESTIMATE                           ********************

 THETA - VECTOR OF FIXED EFFECTS PARAMETERS   *********
         TH 1      TH 2      TH 3      TH 4      TH 5
         9.25E+00  4.68E+01  3.00E+00  1.00E-03 -4.56E-01

 OMEGA - COV MATRIX FOR RANDOM EFFECTS - ETAS  ********
            ETA1      ETA2      ETA3
 ETA1
+        1.53E-02
 ETA2
+        0.00E+00  1.07E-01
 ETA3
+        0.00E+00  0.00E+00  0.00E+00

 SIGMA - COV MATRIX FOR RANDOM EFFECTS - EPSILONS  ****
            EPS1
 EPS1
+        1.00E+00

 OMEGA - CORR MATRIX FOR RANDOM EFFECTS - ETAS  *******
            ETA1      ETA2      ETA3
 ETA1
+        1.24E-01
 ETA2
+        0.00E+00  3.27E-01
 ETA3
+        0.00E+00  0.00E+00  0.00E+00

 SIGMA - CORR MATRIX FOR RANDOM EFFECTS - EPSILONS  ***
            EPS1
 EPS1
+        1.00E+00
 #CPUT: Total CPU Time in Seconds,        0.998
